Z1 := 98
Z2 := 68 + 28i - 19i
Z3 := 31 - 88i
Z4 := 46 - 15i
Z5 := 78i
Z6 := 99i
Z7 := 87i - 22i
J1 := 1.486 + 1.338i
E3 := 67.168 - 58.391i
Z := [Z1; Z2; Z3; Z4; Z5; Z6; Z7]
E := [0; 0; E3; 0; 0; 0; 0]
J := [J1; 0; 0; 0; 0; 0; 0]
A := [
    0, 0, 0, 0, -1, 1, 0;
    0, -1, 1, 0, 0, 0, 0;
    0, 0, 0, -1, 1, 0, -1;
    -1, 1, 0, 0, 0, 0, 1;
    0, 0, -1, 1, 0, 0, 0
]
B := [1, 0, 0, 0, 1, 1, 1; 0, -1, 1, 1, 0, 0, -1]
A1 := [
    0, 0, 0, 0, -1, 1, 0;
    0, 1, -1, 0, 0, 0, 0;
    0, 0, 0, -1, 1, 0, -1;
    1, -1, 0, 0, 0, 0, -1;
    0, 0, 1, -1, 0, 0, 0;
    0, Z2, Z3, Z4, 0, 0, -Z7;
    Z1, 0, 0, 0, Z5, Z6, Z7
] = [
    0, 0, 0, 0, -1, 1, 0;
    0, 1, -1, 0, 0, 0, 0;
    0, 0, 0, -1, 1, 0, -1;
    1, -1, 0, 0, 0, 0, -1;
    0, 0, 1, -1, 0, 0, 0;
    0, 68 + 9i, 31 - 88i, 46 - 15i, 0, 0, -65i;
    98, 0, 0, 0, 78i, 99i, 65i
]
ZD := diag(Z)
G := ZD^-1
IK := (B*ZD*transpose(B))^-1*(B*E + B*ZD*J) = [0.799029 - 0.259749i; 0.565932 + 0.0686752i]
F := (A*G*transpose(A))^-1*(-A*G*E - A*J) = [25.7152 + 79.1039i; 29.4579 + 146.816i; 45.9756 + 141.428i; 67.3232 + 156.579i; 73.0386 + 136.098i]
B1 := [0; 0; 0; -J1; 0; E3; 0] = [0; 0; 0; -1.486 - 1.338i; 0; 67.168 - 58.391i; 0]
Imkt := transpose(B)*IK = [0.799029 - 0.259749i; -0.565932 - 0.0686752i; 0.565932 + 0.0686752i; 0.565932 + 0.0686752i; 0.799029 - 0.259749i; 0.799029 - 0.259749i; 0.233097 - 0.328424i]
U := transpose(A)*F = [-67.3232 - 156.579i; 37.8653 + 9.7633i; -43.5807 + 10.7179i; 27.063 - 5.32992i; 20.2604 + 62.3243i; 25.7152 + 79.1039i; 21.3476 + 15.1513i]
Imkt := Imkt - J = [-0.686971 - 1.59775i; -0.565932 - 0.0686752i; 0.565932 + 0.0686752i; 0.565932 + 0.0686752i; 0.799029 - 0.259749i; 0.799029 - 0.259749i; 0.233097 - 0.328424i]
Ikir := A1^-1*B1 = [-0.686971 - 1.59775i; 0.565932 + 0.0686752i; 0.565932 + 0.0686752i; 0.565932 + 0.0686752i; 0.799029 - 0.259749i; 0.799029 - 0.259749i; 0.233097 - 0.328424i]
Imun := G*(U + E) + J = [0.799029 - 0.259749i; 0.565932 + 0.0686752i; 0.565932 + 0.0686752i; 0.565932 + 0.0686752i; 0.799029 - 0.259749i; 0.799029 - 0.259749i; 0.233097 - 0.328424i]
